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/batch
! ANSYS input file written by Workbench version 18.0 RELEASE
! File used for geometry attach: C:\Users\Felipe\AppData\Local\Temp\WB_DESKTOP-6JAQ9UR_Felipe_168_2\unsaved_project_files\dp0\SYS\DM\SYS.agdb
/title,corpo livre--Static Structural (C5)
/com,--- Data in consistent NMM units. See Solving Units in the help system for more information.
/units,MPA
/prep7
! Turn off shape checking because checks already performed inside WB mesher.
! See help system for more information.
SHPP,OFF,,NOWARN
etcon,set             ! allow ANSYS to choose best KEYOP's for 180x elements
/com,*********** Nodes for the whole assembly ***********
nblock,3,,15027
(1i9,3e20.9e3)
        1    4.800000000E+002    2.900000000E+002    0.000000000E+000
        2    4.800000000E+002    1.660000000E+002    0.000000000E+000
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-1
/com,*********** Elements for Body 1 "PartBody" ***********
et,1,187
eblock,19,solid,,6809
(19i9)
        1        1        1        1        0        0        0        0       10        0        1     1689     1910     1917     1926    11515    12405    11517    11518
    12407    12414
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-1
/com,*********** Send User Defined Coordinate System(s) ***********
csys,0
toffst,273.15,  ! Temperature offset from absolute zero
/com,*********** Set Reference Temperature ***********
tref,22.
/com,*********** Send Materials ***********
MP,DENS,1,7.85e-09,	! tonne mm^-3
MP,ALPX,1,1.2e-05,	! C^-1
MP,C,1,434000000,	! mm^2 s^-2 C^-1
MP,KXX,1,60.5,	! tonne mm s^-3 C^-1
MP,RSVX,1,0.00017,	! ohm mm
MP,EX,1,200000,	! tonne s^-2 mm^-1
MP,NUXY,1,0.3,
MP,MURX,1,10000,

!************************* Model Summary ********************
!PartBody,	Structural Steel,	matid,	1
!************************* End Model Summary ********************
/com,*********** Fixed Supports ***********
CMBLOCK,_FIXEDSU,NODE,      972
(8i10)
         1         2         3         4         5         6         7         8
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cmsel,s,_FIXEDSU
d,all,all
nsel,all
/com,*********** Define Force Using Surface Effect Elements ***********
local,12,0,0.,0.,0.,-0.,0.,0.
csys,0
et,2,154
eblock,10,,,379
(15i9)
     6810        2        2        2       12     1670     1774     1722     1722    11382    11698     1722    11378
     6811        2        2        2       12     1675     1711     1677     1677    11415    11428     1677    11413
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-1
esel,s,type,,2
keyop,2,2,1                ! Apply load in local coordinate system
keyop,2,7,1                ! Use original area so load is constant in large deformation
keyop,2,11,2               ! Use real and not project area
esel,all

*DIM,_loadvari97x,TABLE,2,1,1,TIME,
! Time values
_loadvari97x(1,0,1) = 0.
_loadvari97x(2,0,1) = 1.
! Load values
_loadvari97x(1,1,1) = 0.
_loadvari97x(2,1,1) = 0.


*DIM,_loadvari97y,TABLE,2,1,1,TIME,
! Time values
_loadvari97y(1,0,1) = 0.
_loadvari97y(2,0,1) = 1.
! Load values
_loadvari97y(1,1,1) = 0.
_loadvari97y(2,1,1) = 0.


*DIM,_loadvari97z,TABLE,2,1,1,TIME,
! Time values
_loadvari97z(1,0,1) = 0.
_loadvari97z(2,0,1) = 1.
! Load values
_loadvari97z(1,1,1) = 0.
_loadvari97z(2,1,1) = -2.76839864940468e-004

/com,*********** Define Force Using Surface Effect Elements ***********
local,13,0,0.,0.,0.,-0.,0.,0.
csys,0
et,3,154
eblock,10,,,162
(15i9)
     7189        3        3        3       13      708     1317     1316     1316     6540     9226     1316     6539
     7190        3        3        3       13       83      708     1316     1316     3002     6539     1316     3005
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-1
esel,s,type,,3
keyop,3,2,1                ! Apply load in local coordinate system
keyop,3,7,1                ! Use original area so load is constant in large deformation
keyop,3,11,2               ! Use real and not project area
esel,all

*DIM,_loadvari99x,TABLE,2,1,1,TIME,
! Time values
_loadvari99x(1,0,1) = 0.
_loadvari99x(2,0,1) = 1.
! Load values
_loadvari99x(1,1,1) = 0.
_loadvari99x(2,1,1) = 0.


*DIM,_loadvari99y,TABLE,2,1,1,TIME,
! Time values
_loadvari99y(1,0,1) = 0.
_loadvari99y(2,0,1) = 1.
! Load values
_loadvari99y(1,1,1) = 0.
_loadvari99y(2,1,1) = 0.


*DIM,_loadvari99z,TABLE,2,1,1,TIME,
! Time values
_loadvari99z(1,0,1) = 0.
_loadvari99z(2,0,1) = 1.
! Load values
_loadvari99z(1,1,1) = 0.
_loadvari99z(2,1,1) = -2.00573065902518e-003

/com,*********** Define Force Using Surface Effect Elements ***********
local,14,0,0.,0.,0.,-0.,0.,0.
csys,0
et,4,154
eblock,10,,,76
(15i9)
     7351        4        4        4       14     1792     1802     1807     1807    12003    12063     1807    12004
     7352        4        4        4       14     1792     1807     1801     1801    12004    12060     1801    12002
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-1
esel,s,type,,4
keyop,4,2,1                ! Apply load in local coordinate system
keyop,4,7,1                ! Use original area so load is constant in large deformation
keyop,4,11,2               ! Use real and not project area
esel,all

*DIM,_loadvari111x,TABLE,2,1,1,TIME,
! Time values
_loadvari111x(1,0,1) = 0.
_loadvari111x(2,0,1) = 1.
! Load values
_loadvari111x(1,1,1) = 0.
_loadvari111x(2,1,1) = 0.


*DIM,_loadvari111y,TABLE,2,1,1,TIME,
! Time values
_loadvari111y(1,0,1) = 0.
_loadvari111y(2,0,1) = 1.
! Load values
_loadvari111y(1,1,1) = 0.
_loadvari111y(2,1,1) = 0.


*DIM,_loadvari111z,TABLE,2,1,1,TIME,
! Time values
_loadvari111z(1,0,1) = 0.
_loadvari111z(2,0,1) = 1.
! Load values
_loadvari111z(1,1,1) = 0.
_loadvari111z(2,1,1) = -1.13378684807222e-003

fini
/com,****************************************************************************
/com,*************************    SOLUTION       ********************************
/com,****************************************************************************
/solu
antype,0                   ! static analysis
eqsl,sparse,,,,,1
cntr,print,1               ! print out contact info and also make no initial contact an error
dmpoption,emat,no             ! Don't combine emat file for DANSYS
dmpoption,esav,no             ! Don't combine esav file for DANSYS
nldiag,cont,iter           ! print out contact info each equilibrium iteration
rescontrol,,none                 ! Do not keep any restart files
/com,****************************************************
/com,******************* SOLVE FOR LS 1 OF 1 ****************
esel,s,type,,2
nsle
sfe,all,1,pres,1,%_loadvari97x%
sfe,all,2,pres,1,%_loadvari97y%
sfe,all,3,pres,1,%_loadvari97z%
esel,s,type,,3
nsle
sfe,all,1,pres,1,%_loadvari99x%
sfe,all,2,pres,1,%_loadvari99y%
sfe,all,3,pres,1,%_loadvari99z%
esel,s,type,,4
nsle
sfe,all,1,pres,1,%_loadvari111x%
sfe,all,2,pres,1,%_loadvari111y%
sfe,all,3,pres,1,%_loadvari111z%
nsel,all
esel,all
nsub,1,1,1
time,1.
outres,erase
outres,all,none
outres,nsol,all
outres,rsol,all
outres,strs,all
outres,epel,all
outres,eppl,all
stabilize,off                   ! Stabilization turned OFF by user
! *********** WB SOLVE COMMAND ***********
! check interactive state
*get,ANSINTER_,active,,int
*if,ANSINTER_,ne,0,then
/eof
*endif
solve
/com *************** Write FE CONNECTORS *********
CEWRITE,file,ce,,INTE
/com,****************************************************
/com,*************** FINISHED SOLVE FOR LS 1 *************
*set,_DS_PROGRESS          ! turn off progress updates to avoid virus scanning bug
/post1
fini
