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/batch
! ANSYS input file written by Workbench version 18.0 RELEASE
! File used for geometry attach: C:\Users\Felipe\AppData\Local\Temp\WB_DESKTOP-6JAQ9UR_Felipe_168_2\unsaved_project_files\dp0\SYS\DM\SYS.agdb
/title,corpo livre--Modal 2 (D5)
/com,--- Data in consistent NMM units. See Solving Units in the help system for more information.
/units,MPA
/prep7
! Turn off shape checking because checks already performed inside WB mesher.
! See help system for more information.
SHPP,OFF,,NOWARN
etcon,set             ! allow ANSYS to choose best KEYOP's for 180x elements
/com,*********** Nodes for the whole assembly ***********
nblock,3,,15027
(1i9,3e20.9e3)
        1    4.800000000E+002    2.900000000E+002    0.000000000E+000
        2    4.800000000E+002    1.660000000E+002    0.000000000E+000
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-1
/com,*********** Elements for Body 1 "PartBody" ***********
et,1,187
eblock,19,solid,,6809
(19i9)
        1        1        1        1        0        0        0        0       10        0        1     1689     1910     1917     1926    11515    12405    11517    11518
    12407    12414
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-1
/com,*********** Send User Defined Coordinate System(s) ***********
csys,0
toffst,273.15,  ! Temperature offset from absolute zero
/com,*********** Set Reference Temperature ***********
tref,22.
/com,*********** Send Materials ***********
MP,DENS,1,7.85e-09,	! tonne mm^-3
MP,ALPX,1,1.2e-05,	! C^-1
MP,C,1,434000000,	! mm^2 s^-2 C^-1
MP,KXX,1,60.5,	! tonne mm s^-3 C^-1
MP,RSVX,1,0.00017,	! ohm mm
MP,EX,1,200000,	! tonne s^-2 mm^-1
MP,NUXY,1,0.3,
MP,MURX,1,10000,

!************************* Model Summary ********************
!PartBody,	Structural Steel,	matid,	1
!************************* End Model Summary ********************
/com,*********** Fixed Supports ***********
CMBLOCK,_FIXEDSU,NODE,      972
(8i10)
         1         2         3         4         5         6         7         8
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cmsel,s,_FIXEDSU
d,all,all
nsel,all
/com,*********** Send Distributed Mass Using Surface Effect **********
et,2,154
r,2,,,,,,2.00573e-007
type,2
mat,2
real,2
eblock,10,,,162
(15i9)
     6810        2        2        2        0      708     1317     1316     1316     6540     9226     1316     6539
     6811        2        2        2        0       83      708     1316     1316     3002     6539     1316     3005
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-1
esel,s,type,,2
esel,all
/com,*********** Send Distributed Mass Using Surface Effect **********
et,3,154
r,3,,,,,,2.7684e-008
type,3
mat,3
real,3
eblock,10,,,379
(15i9)
     6972        3        3        3        0     1670     1774     1722     1722    11382    11698     1722    11378
     6973        3        3        3        0     1675     1711     1677     1677    11415    11428     1677    11413
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-1
esel,s,type,,3
esel,all
/com,*********** Send Distributed Mass Using Surface Effect **********
et,4,154
r,4,,,,,,1.13379e-007
type,4
mat,4
real,4
eblock,10,,,76
(15i9)
     7351        4        4        4        0     1792     1802     1807     1807    12003    12063     1807    12004
     7352        4        4        4        0     1792     1807     1801     1801    12004    12060     1801    12002
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-1
esel,s,type,,4
esel,all
fini
/solu
antype,2                   ! modal analysis
modopt,lanb,6
outres,erase
outres,all,none
outres,nsol,all
mxpand                    ! default expand in case of complex solution
! *********** WB SOLVE COMMAND ***********
! check interactive state
*get,ANSINTER_,active,,int
*if,ANSINTER_,ne,0,then
/eof
*endif
solve
/com *************** Write FE CONNECTORS *********
CEWRITE,file,ce,,INTE
*get,_nmodalsolproc,active,0,numcpu
fini
/post1
*dim,_direction,CHAR,6,1
_direction(1) = 'X'
_direction(2) = 'Y'
_direction(3) = 'Z'
_direction(4) = 'ROTX'
_direction(5) = 'ROTY'
_direction(6) = 'ROTZ'
*get,_lastLS,active,0,set,LSTP
*get,_beginset,active,0,set,nset,first,_lastLS
*get,_endset,active,0,set,nset,last,_lastLS
_nummodes = _endset - _beginset + 1
*do,i_mode,1,_nummodes
   *do,j_component,1,6
			*get,PFACT_%i_mode%_%j_component%,MODE,%i_mode%,PFACT,,DIREC,_direction(%j_component%)
   *enddo
*enddo
fini
